# vim:fileencoding=utf-8:ft=cgx
read geom.fbd
seta orig l laminate

# Read result data
read job.frd
# Read input data (sets)
read job.inp

# mirror
#copy all new mir y
#comp all do

# First line of text below the window.
capt Carbon/epoxy omega profile
# Second line of text.
ulin Displacement

# Define the view.
rot y
rot r 45
rot u 30
frame

# Displacements
# Use the “turbo” colormap.
cmap turbo
# ds 1 is displacement. e 3 is z-displacement, e 4 is x+y+z.
ds 1 e 4
# View the deformed state.
view disp
# Don't use shading.
view sh off
# Show the element borders
view elem
# Show undeformed shape.
plus l orig 2
