# vim:fileencoding=utf-8:ft=cgx

# Read result data
read job.frd
# Read input data (sets)
read job.inp

# mirror
#copy all new mir y
#comp all do

capt Carbon/epoxy omega profile
ulin Worst principal strain

# Define the view.
rot y
rot r 45
rot u 30
frame

cmap turbo
ds 2 e 23
view disp
view sh off
view elem
